// COMSOL Multiphysics 5.0.1.276 model "2D-Cloak.mph"
// 2D Cloak
// Outline of the model tree

Parameters
  R0 = 0.25[in]  // Inner radius of superconductor.
  R1 = 0.5[in]  // Outer radius of superconductor.
  R2 = R1+gap  // Inner radius of ferromagnet.
  R3 = 0.75[in]  // Outer radius of ferromagnet.
  mu_SC = 0.001  // Relative permiability of superconductor.
  mu_FM = (R2^2+R1^2)/(R2^2-R1^2)  // Relative permiability of ferromagnet.
  Rworld = 12[in]  // Radius of world area.
  Bext = 500[mT]  // External/backgroud magnetic flux density.
  gap = 1[mm]  // Air gap between superconductor and ferromagnet.

Selections
  sel1: Explicit "Infinite Element Domain" on domains 3
  com1: Complement "Analysis Domain" | input = {sel1}

Coordinate systems
  ie1: InfiniteElement "Infinite Element Domain 1" on domains 3 | ScalingType = Cylindrical

Geometry
  geom1 "Geometry 1" (2D, length unit mm)
    c1: Circle "SC Inner" | r = R0
    c2: Circle "SC Outter" | r = R1
    dif2: Difference "SC" | contributeto = csel1; input = c2; input2 = c1
    c6: Circle "FM Inner" | r = R2
    c3: Circle "FM Outter" | r = R3
    dif1: Difference "FM" | contributeto = csel2; input = c3; input2 = c6
    c4: Circle "World" | r = Rworld
    c5: Circle "Infinite Element Domain" | r = 2*Rworld
    pol1: Polygon
      x = range(-Rworld/sqrt(2),(Rworld/sqrt(2)-(-Rworld/sqrt(2)))/1,Rworld/sqrt(2))
      y = -Rworld/sqrt(2)*1^range(1,2)
    fin: Finalize "Form Union"

Materials
  mat1: Common "Air" on all domains
    def "Basic"
      relpermeability = 1
      relpermittivity = 1
      dynamicviscosity = eta(T[1/K])[Pa*s]
      ratioofspecificheat = 1.4
      electricconductivity = 0[S/m]
      heatcapacity = Cp(T[1/K])[J/(kg*K)]
      density = rho(pA[1/Pa],T[1/K])[kg/m^3]
      thermalconductivity = k(T[1/K])[W/(m*K)]
      soundspeed = cs(T[1/K])[m/s]
      eta: Piecewise | arg = T; extrap = constant; pieces = {200.0, 1600.0, -8.38278E-7+8.35717342E-8*T^1-7.69429583E-11*T^2+4.6437266E-14*T^3-1.06585607E-17*T^4}
      Cp: Piecewise | arg = T; extrap = constant; pieces = {200.0, 1600.0, 1047.63657-0.372589265*T^1+9.45304214E-4*T^2-6.02409443E-7*T^3+1.2858961E-10*T^4}
      rho: Analytic | expr = pA*0.02897/8.314/T; args = {pA, T}; dermethod = manual; argders = {{pA, d(pA*0.02897/8.314/T,pA)}, {T, d(pA*0.02897/8.314/T,T)}}
      k: Piecewise | arg = T; extrap = constant; pieces = {200.0, 1600.0, -0.00227583562+1.15480022E-4*T^1-7.90252856E-8*T^2+4.11702505E-11*T^3-7.43864331E-15*T^4}
      cs: Analytic | expr = sqrt(1.4*287*T); args = T; dermethod = manual; argders = {T, d(sqrt(1.4*287*T),T)}
    RefractiveIndex
      n = 1
      ki = 0
  mat2: Common "Superconductor (from Copper)" on selection geom1_csel1_dom
    def "Basic"
      relpermeability = mu_SC
      electricconductivity = 5.998e7[S/m]
      heatcapacity = 385[J/(kg*K)]
      relpermittivity = 1
      emissivity = 0.5
      density = 8700[kg/m^3]
      thermalconductivity = 400[W/(m*K)]
    linzRes "Linearized resistivity"
      rho0 = 1.72e-8[ohm*m]
      alpha = 3.9e-3[1/K]
      Tref = 273.15[K]
  mat3: Common "Ferromagnet (from Iron)" on selection geom1_csel2_dom
    def "Basic"
      relpermeability = mu_FM
      electricconductivity = 1.12e7[S/m]
      thermalexpansioncoefficient = 12.2e-6[1/K]
      heatcapacity = 440[J/(kg*K)]
      relpermittivity = 1
      density = 7870[kg/m^3]
      thermalconductivity = 76.2[W/(m*K)]
    Enu "Young's modulus and Poisson's ratio"
      youngsmodulus = 200e9[Pa]
      poissonsratio = 0.29

Physics
  mfnc: MagnetostaticsNoCurrents "Magnetic Fields, No Currents" on all domains
    dependent variable Vm
    BackgroundField.SolveFor = ReducedField
    BackgroundField.Hb = {0, Bext/mu0_const, 0}
    mfc1: MagneticFluxConservation (default)
    mi1: MagneticInsulation (default)
    init1: init "Initial Values 1" (default)
    zsp1: ZeroMagneticScalarPotential on points 9

Mesh
  mesh1 "Mesh 1" (physics-controlled)
    size: MeshSizeDefault | hauto = 4

Studies
  std1 "Study 1"
    stat: Stationary

Solver configurations
  sol1 "Solution 1" (study std1)
    v1: Variables "Dependent Variables 1"
    s1: Stationary "Stationary Solver 1"
      dDef: Direct
      fc1: FullyCoupled | linsolver = dDef

Datasets
  dset1: Solution | solution = sol1
  cln1: CutLine2D "Cut Line 2D x Center" | data = dset1; method = twopoint; genpoints = {{-Rworld, 0}, {Rworld, 0}}
  cln2: CutLine2D "Cut Line 2D y Center" | data = dset1; genpoints = {{0, -Rworld}, {0, Rworld}}
  cln3: CutLine2D "Cut Line 2D x FM Edge"
    data = dset1
    genpoints = {{-sqrt(Rworld^2-R2^2), -R2}, {sqrt(Rworld^2-R2^2), -R2}}
  cln4: CutLine2D "Cut Line 2D y FM Edge"
    data = dset1
    genpoints = {{-R2, -sqrt(Rworld^2-R2^2)}, {-R2, sqrt(Rworld^2-R2^2)}}
  cln5: CutLine2D | data = dset1; genpoints = {{-Rworld/sqrt(2), -Rworld/sqrt(2)}, {Rworld/sqrt(2), -Rworld/sqrt(2)}}

Plots
  pg7: PlotGroup2D "|B| streamline" | data = dset1
    surf1: Surface | expr = mfnc.normB; unit = mT
    str1: Streamline on boundaries 1 | expr = {mfnc.Bx, mfnc.By}; madv = manual; mseed = {R0, -Rworld}
  pg1: PlotGroup2D "|B| arrows" | data = dset1
    surf1: Surface | expr = mfnc.normB; unit = mT
    arws1: ArrowSurface
      expr = {mfnc.Bx, mfnc.By}
      arrowxmethod = coord
      xcoord = range(-Rworld/sqrt(2)*19/20,(Rworld/sqrt(2)*19/20-(-Rworld/sqrt(2)*19/20))/19,Rworld/sqrt(2)*19/20)
      arrowymethod = coord
      ynumber = 1
      ycoord = range(-Rworld/sqrt(2)*19/20,(Rworld/sqrt(2)*19/20-(-Rworld/sqrt(2)*19/20))/19,Rworld/sqrt(2)*19/20)
      arrowlength = proportional
  pg6: PlotGroup2D "|B| arrows + streamline" | data = dset1
    surf1: Surface | expr = mfnc.normB; unit = mT
    str1: Streamline on boundaries 1 | expr = {mfnc.Bx, mfnc.By}; madv = manual; mseed = {R0, -Rworld}
    arws2: ArrowSurface | expr = {mfnc.Bx, mfnc.By}
  pg2: PlotGroup1D "x Center" | data = cln1
    lngr1: LineGraph "Bx"
      inputmode = linesecond
      cutmode = off
      listen = on
      expr = mfnc.Bx
      unit = mT
      xdata = expr
      xdataexpr = x
      legends = Bx
    lngr2: LineGraph "By"
      inputmode = linesecond
      cutmode = off
      listen = on
      expr = mfnc.By
      unit = mT
      xdata = expr
      xdataexpr = x
      legends = By
    lngr3: LineGraph "Bz"
      inputmode = linesecond
      cutmode = off
      listen = on
      expr = mfnc.Bz
      unit = mT
      xdata = expr
      xdataexpr = x
      legends = Bz
  pg4: PlotGroup1D "y Center" | data = cln2
    lngr1: LineGraph "Bx"
      inputmode = linesecond
      cutmode = off
      listen = on
      expr = mfnc.Bx
      unit = mT
      xdata = expr
      xdataexpr = y
      legends = Bx
    lngr2: LineGraph "By"
      inputmode = linesecond
      cutmode = off
      listen = on
      expr = mfnc.By
      unit = mT
      xdata = expr
      xdataexpr = y
      legends = By
    lngr3: LineGraph "Bz"
      inputmode = linesecond
      cutmode = off
      listen = on
      expr = mfnc.Bz
      unit = mT
      xdata = expr
      xdataexpr = y
      legends = Bz
  pg3: PlotGroup1D "x FM Edge" | data = cln3
    lngr1: LineGraph "Bx"
      inputmode = linesecond
      cutmode = off
      listen = on
      expr = mfnc.Bx
      unit = mT
      xdata = expr
      xdataexpr = x
      legends = Bx
    lngr2: LineGraph "By"
      inputmode = linesecond
      cutmode = off
      listen = on
      expr = mfnc.By
      unit = mT
      xdata = expr
      xdataexpr = x
      legends = By
    lngr3: LineGraph "Bz"
      inputmode = linesecond
      cutmode = off
      listen = on
      expr = mfnc.Bz
      unit = mT
      xdata = expr
      xdataexpr = x
      legends = Bz
  pg5: PlotGroup1D "y FM Edge" | data = cln4
    lngr1: LineGraph "Bx"
      inputmode = linesecond
      cutmode = off
      listen = on
      expr = mfnc.Bx
      unit = mT
      xdata = expr
      xdataexpr = y
      legends = Bx
    lngr2: LineGraph "By"
      inputmode = linesecond
      cutmode = off
      listen = on
      expr = mfnc.By
      unit = mT
      xdata = expr
      xdataexpr = y
      legends = By
    lngr3: LineGraph "Bz"
      inputmode = linesecond
      cutmode = off
      listen = on
      expr = mfnc.Bz
      unit = mT
      xdata = expr
      xdataexpr = y
      legends = Bz